// COMSOL Multiphysics 6.1.0.357 model "single_small_gate_2deg_inalas_semi_ec.mph"
// Outline of the model tree

Parameters
  L_gate2gate = 0 [nm]  // Spacing between gates
  L_drain = 200[nm]  // Length of the drain contact
  L_source = L_drain  // Length of the source contact
  L_gate = 0 [nm]  // Length of the gate contact
  L_air = 10 [nm]  // Length of the air gap regions
  Ltot = 500[nm]  // Total length (x-extent) of the device
  H_2deg = H_InGaAs_top + H_InGaAs_bot + H_InAs  // Height of the Si-p device
  H_drain = H_2deg  // Height of the drain contact
  d_ins = 50 [nm]  // Thickness of gate oxide
  epsr_SiO2 = 3.8  // Dielectric constant of SiO2 for gate oxide
  PhiB = 2.98 [V]  // Barrier of Au on SiO2
  Na = 1e16[cm^-3]  // Doping of the p-regions
  Nd = 1e18[cm^-3]  // Doping of the n+ regions
  H_source = H_2deg  // Height of the source contact
  H_air = H_2deg  // Height of the air gap regions
  Tref = 300 [K]  // Reference temperature
  mn_Si = 1/(1/3 * (1/0.98 + 2/0.19)) * me_const  // Conductivity effective electron mass of Si
  mp_Si = 0.36 * me_const  // Conductivity effective hole mass of Si
  H_gate = 50 [nm]  // Height of the gate
  mn_InAs = 0.023 * me_const  // Effective electron mass of InAs
  mh_InAs = 1/(((0.36^(3/2) + 0.026^(3/2))^(2/3)) / (0.36^5/2 + 0.026^(5/2))) * me_const  // Effective hole mass of InAs
  epsr_InAlAs = 13.1334  // Dielectric constant of In_0.81Al_0.91As
  cp_Na = 1  // Continuation parameter for p-doping
  cp_PhiB = 1  // Continuation parameter for barrier height
  Phi_Au = 5.1 [V]  // Work function of Au
  tmin = 0 [s]  // Start time for time dependent study
  fmax = 8 [GHz]  // Max frequency to interrogate
  fmin = 4 [GHz]  // Min frequency to interrogate
  fs = 10 * fmax  // Sampling frequency for time-dependent study
  dt = 1 / fs  // Time step for time-dependent study
  tmax = 5 / fmin  // Run 5 cycles of slowest frequency
  Nt = (tmax - tmin) / dt  // Number of time steps in the time-dependent study
  vSat = 8e6[cm/s]  // Saturation velocity
  PhiAu = 4.5[V]  // Work function of Au
  PhiAir = 5[V]  // Barrier for the air semiconductor material
  Nv_InGaAs = 2*(2*pi*mpd_InGaAs * Tref * k_B_const / h_const^2)^(3/2.)  // Valence band effective density of states in InGaAs
  Nv_InAscm3 = (Tref/1[K])^(3/2)*1.68e13[1/cm^3]*1e-6
  Nv_InAlAs = 2*(2*pi*mpd_InAlAs * Tref * k_B_const / h_const^2)^(3/2.)  // Effective density of states at the valence band - - InAlAs
  Nref = 1e18[m^3]  // Reference concentration
  Nd_InAs = (1e12[cm^-2])^(3/2)  // Doping of the InAs 2DEG
  Nd_InAlAs = (7.5e10[cm^-2])^(3/2)  // Si delta doping concentration in the InAlAs buffer layer
  Nc_InGaAs = 2*(2*pi*me_eff * Tref * k_B_const / h_const^2)^(3/2.)  // Conduction band effective density of states in InGaAs
  Nc_InAlAs = 2*(2*pi*mn_InAlAs * Tref * k_B_const / h_const^2)^(3/2.)  // Effective density of states in the conduction band -- InAlAs
  muSS = 100[cm^2/V/s]  // SS hole mobility, all materials
  mup_InAlAs = 384 [cm^2/V/s]  // Hole mobility (alloy-scattering limited) of InAlAs
  mun0 = 14.4e3[cm^2/(V*s)]  // Electron mobility at mK in 2DEG
  muLFW = 5e2[cm^2/(V*s)]  // LF hole mobility, well
  muLFB = 450[cm^2/V/s]  // LF hole mobility, barrier estimated from mup_al
  mpd_InGaAs = 0.403906 * me_const  // DOS effective mass of holes in InGaAs
  mpd_InAlAs = 0.458142 * me_const  // Effective density of states hole mass of InAlAs
  mpc_InGaAs = 0.248245 * me_const  // Conduction effective mass of holes in InGaAs
  mp_InAlAs = 0.306199 * me_const  // Effective hole mass in InAlAs
  mn_sio2 = 0.58 * me_const  // Effective electron mass in SiO2 from [J. Appl. Phys. 109, 104508 (2011)]
  mn_InAlAs = 0.0411532 * me_const  // Effective electron mass InAlAs
  me_eff = 0.0309388 * me_const  // Effective mass in InGaAs computed at the gamma point of the conduction band
  me_2deg = 0.023*me_const  // Effective electron mass in 2DEG from [arXiv:1911.02738v1 (2019)]
  l_coh = 200[nm]  // Coherence length, dirty limit
  ESS = 3e5[V/cm]  // SS electric field, all materials
  epsrW = 15.15  // Dielectric constant, well
  epsrB = 14.034  // Dielectric constant, barrier
  epsr_Al2O3 = 10  // Dielectric constant of Al2O3
  EgW0 = 0.354[V]  // Band gap, well -- InAs
  EgW = EgW0*cp+EgB*(1-cp)  // Band gap, well
  EgB = 0.473228[V]  // Band gap, barrier -- InGaAs
  Eg_InAlAs = 0.751882 [V]  // Band gap of InAlAs
  Dnprox = 0.5*(hbar_const^2 * mun0 / (e_const * me_2deg)) * (3*pi^2 * Nd_InAs)^2/3  // Proximity effect diffusion constant
  deltaEd_v = 0.015[V]  // Valence band offset of acceptors in InAs
  deltaEd_c = 0.001[V]  // Conduction band offset of donors in InAs
  deltaEc2 = 0.201 [V]  // Conduction band offset of InAlAs from InGaAs
  deltaEc = 0.2[V]  // 2DEG conduction band offset taken from [APL 87, 043504 (2005)]
  d_SiO2 = 100[nm]  // Thickness of SiO2 oxide
  cp = 1  // Continuation parameter for heterojunction and doping
  chiW0 = 4.9[V]  // Electron affinity, well
  chiW = chiW0*cp+chiB*(1-cp)  // Electron affinity, well
  chiB2 = chiB - deltaEc2  // Electron affinity of InAlAs
  chiB = chiW0 - deltaEc  // Electron affinity, barrier
  d0 = 5[um]  // Out of plane thickness
  H_InGaAs_top = 10[nm]  // Top InGaAs layer in 2DEG
  H_InAs = 4[nm]  // InAs layer thickness
  H_InGaAs_bot = 4[nm]  // Bottom InGaAs layer in 2DEG
  mn_InGaAs = 0.0309388 * me_const  // Effective conductivity electron mass
  H_InAlAs = 100[nm]  // Height of the dielectric
  N_gates = 1  // Number of gates in the base geometry
  n_edges = 20  // Number of edge elements
  edge_ratio = 5  // Ratio of edge elements in distribution
  Vac = -1[mV]  // AC perturbation
  w0 = 2*pi*fmin  // Angular frequency of the time-dependent frequency domain sweep
  L_gate_tmp = (Ltot - (L_drain + L_source)) / 1e-9[m]
  L_tot_tmp = Ltot / 1e-9[m]
  Ltot_old = (2*(L_source + L_drain) + N_gates * L_gate + (N_gates + 1) * L_gate2gate)
  eps_gap = 2  // Dielectric constant of air gap
  L_contact = 200 [nm]  // Contact length with n+ doping
  H_InP = 350[um]  // Height of InP substrate
  chi_InAlAs = 4.5 [V]  // Electron affinity of InAlAs from Anderson's rule
  L_2deg = 100[nm]  // Length of the 2DEG (junction region proximitized by Al contacts)
  h_Al = 10 [nm]  // Height of the aluminum plates
  w_gate = 10[um]  // Width of the aluminum contacts
  w_2deg = 2 * w_gate + L_2deg  // Width of the stack
  Nf = 10  // Number of frequency steps
  Vs_on = 0  // Turns on Vs ac/dc
  Vd_on = 0  // Turn on Vd ac/dc
  Vg_on = 0  // Turns on Vg ac/dc
  nvert_al = 5
  nvert_2deg = 10
  nvert_inalas = 30
  nvert_al2o3 = 10
  Vdc = -5 [V]  // DC bias on source and drain contacts
  Vsd = 100[mV]
  TerminalName = 1
  sigma_0 = 1e-2[S/m]

Functions
  step1: Step | location = 0.5
  ext1: External "External Chirp" (disabled)
    path = /home/nmaterise/mines/research/tcap/libchirp.so
    funcs = {chirp, "t, f0, t1, f1, phi"}
    ders = 
      {chirp, t, dchirpdt}
      {chirp, f0, dchirpdf0}
      {chirp, t1, dchirpdt1}
      {chirp, f1, dchirpdf1}
      {chirp, phi, dchirpdphi}
    threadsafe = on

Geometry
  geom1 "Geometry 1" (2D, length unit m)
    r17: Rectangle "InP Substrate" | pos = {0, -H_InP}; size = {w_2deg, H_InP}
    r7: Rectangle "InAlAs Dielectric" | size = {w_2deg, H_InAlAs}
    r10: Rectangle "InGaAs Bottom" | pos = {0, H_InAlAs}; size = {w_2deg, H_InGaAs_bot}
    r9: Rectangle "InAs" | pos = {0, (H_InAlAs + H_InGaAs_bot)}; size = {w_2deg, H_InAs}
    r8: Rectangle "InGaAs Top" | pos = {0, (H_InAlAs + H_2deg - H_InGaAs_top)}; size = {w_2deg, H_InGaAs_top}
    r21: Rectangle "Center Oxide" | pos = {(w_2deg/2-L_2deg/2), (H_InAlAs + H_2deg)}; size = {L_2deg, H_gate}
    r24: Rectangle "Right Al Contact" | pos = {(w_2deg-w_gate), (H_InAlAs + H_2deg)}; size = {w_gate, h_Al}
    r25: Rectangle "Left Al Contact" | pos = {0, (H_InAlAs + H_2deg)}; size = {w_gate, h_Al}
    r22: Rectangle "Left Oxide" (disabled) | pos = {(w_2deg-w_gate), (H_InAlAs + H_2deg + h_Al)}; size = {w_gate, H_gate}
    r23: Rectangle "Left Oxide 1" (disabled) | pos = {0, (H_InAlAs + H_2deg+h_Al)}; size = {w_gate, H_gate}
    uni1: Union (disabled) | input = r21, r22, r23
    fin: Finalize "Form Union"

Materials
  mat7: Common "SiO2 Dielectric" on domains 6-8
    def "Basic"
      relpermittivity = root.epsr_SiO2
      electricconductivity = 0
  mat3: Common "InAs - Indium Arsenide" on domains 4
    def "Basic"
      relpermittivity = 15.15
      thermalconductivity = 27
      density = 5680[kg/m^3]
      heatcapacity = 250[J/(kg*K)]
      electricconductivity = sigma_0
    SemicondMaterial "Semiconductor material"
      Eg0 = 0.354[V]
      chi0 = 4.9[V]
      Nv = (T/1[K])^(3/2)*1.27e15[1/cm^3]
      Nc = (T/1[K])^(3/2)*1.68e13[1/cm^3]
      mun = 4e4[cm^2/(V*s)]
      mup = 5e2[cm^2/(V*s)]
    JainRoulstonModel
      An_jr = 14e-9[V]
      Bn_jr = 1.97e-7[V]
      Cn_jr = 57.9e-12[V]
      Ap_jr = 8.34e-9[V]
      Bp_jr = 2.91e-7[V]
      Cp_jr = 4.53e-12[V]
      Nref_jr = 1[1/cm^3]
      alpha_jr = 0.5
    SemicondMaterialDG "Semiconductor material, density-gradient"
      meDG = mn_InAs
      mhDG = mh_InAs
  mat4: Common "In_0.81 Al_0.19 As" on domains 2
    def "Basic"
      relpermittivity = epsr_InAlAs
      electricconductivity = sigma_0
    SemicondMaterial "Semiconductor material"
      Eg0 = Eg_InAlAs
      chi0 = chi_InAlAs
      Nv = Nv_InAlAs
      Nc = Nc_InAlAs
      mun = mun0
      mup = mup_InAlAs
    SemicondMaterialDG "Semiconductor material, density-gradient"
      meDG = mn_InAlAs
      mhDG = mp_InAlAs
  mat6: Common "In_0.81 Ga_0.19 As" on domains 3, 5, 6, 8
    def "Basic"
      relpermittivity = root.epsrB
      thermalconductivity = 27
      density = 5680[kg/m^3]
      heatcapacity = 250[J/(kg*K)]
      electricconductivity = sigma_0
    SemicondMaterial "Semiconductor material"
      Eg0 = root.EgB
      chi0 = root.chiB
      Nv = (T/1[K])^(3/2)*1.27e15[1/cm^3]
      Nc = (T/1[K])^(3/2)*1.68e13[1/cm^3]
      mun = mun0
      mup = muLFB
    JainRoulstonModel
      An_jr = 14e-9[V]
      Bn_jr = 1.97e-7[V]
      Cn_jr = 57.9e-12[V]
      Ap_jr = 8.34e-9[V]
      Bp_jr = 2.91e-7[V]
      Cp_jr = 4.53e-12[V]
      Nref_jr = 1[1/cm^3]
      alpha_jr = 0.5
    SemicondMaterialDG "Semiconductor material, density-gradient"
      meDG = mn_InGaAs
      mhDG = mpc_InGaAs
  mat8: Common "InP - Indium Phosphide" on domains 1
    def "Basic"
      relpermittivity = 12.5
      thermalconductivity = 68[W/(m*K)]
      density = 4810[kg/m^3]
      heatcapacity = 310[J/(kg*K)]
      electricconductivity = sigma_0
    SemicondMaterial "Semiconductor material"
      Eg0 = 1.344[V]
      chi0 = 4.38[V]
      Nv = (T/1[K])^(3/2)*2.2e15[1/cm^3]
      Nc = (T/1[K])^(3/2)*1.1e14[1/cm^3]
      mun = 5400[cm^2/(V*s)]
      mup = 200[cm^2/(V*s)]
    JainRoulstonModel
      An_jr = 17.2e-9[V]
      Bn_jr = 2.62e-7[V]
      Cn_jr = 98.4e-12[V]
      Ap_jr = 10.3e-9[V]
      Bp_jr = 4.43e-7[V]
      Cp_jr = 3.38e-12[V]
      Nref_jr = 1[1/cm^3]
      alpha_jr = 0.5
    SemicondMaterialDG "Semiconductor material, density-gradient"
      meDG = mun0
  mat9: Common "Air" on domains 6, 8
    def "Basic"
      thermalexpansioncoefficient = alpha_p(pA,T)
      molarmass = 0.02897[kg/mol]
      bulkviscosity = muB(T)
      relpermeability = 1
      relpermittivity = 1
      dynamicviscosity = eta(T)
      ratioofspecificheat = 1.4
      electricconductivity = 0[S/m]
      heatcapacity = Cp(T)
      density = rho(pA,T)
      thermalconductivity = k(T)
      soundspeed = cs(T)
      eta: Piecewise | arg = T; pieces = {200.0, 1600.0, -8.38278E-7+8.35717342E-8*T^1-7.69429583E-11*T^2+4.6437266E-14*T^3-1.06585607E-17*T^4}; argunit = K; fununit = Pa*s
      Cp: Piecewise | arg = T; pieces = {200.0, 1600.0, 1047.63657-0.372589265*T^1+9.45304214E-4*T^2-6.02409443E-7*T^3+1.2858961E-10*T^4}; argunit = K; fununit = J/(kg*K)
      rho: Analytic | expr = pA*0.02897/R_const[K*mol/J]/T; args = {pA, T}; fununit = kg/m^3; argunit = {Pa, K}
      k: Piecewise | arg = T; pieces = {200.0, 1600.0, -0.00227583562+1.15480022E-4*T^1-7.90252856E-8*T^2+4.11702505E-11*T^3-7.43864331E-15*T^4}; argunit = K; fununit = W/(m*K)
      cs: Analytic | expr = sqrt(1.4*R_const[K*mol/J]/0.02897*T); args = T; fununit = m/s; argunit = K
      an1: Analytic | funcname = alpha_p; expr = -1/rho(pA,T)*d(rho(pA,T),T); args = {pA, T}; fununit = 1/K; argunit = {Pa, K}
      an2: Analytic "Analytic 2a" | funcname = muB; expr = 0.6*eta(T); args = T; fununit = Pa*s; argunit = K
    RefractiveIndex
      n = 1
      ki = 0
    NonlinearModel
      BA = (def.gamma+1)/2
    idealGas
      Rs = R_const/Mn
      heatcapacity = Cp(T)
      ratioofspecificheat = 1.4
      molarmass = 0.02897
      Cp: Piecewise | arg = T; pieces = {200.0, 1600.0, 1047.63657-0.372589265*T^1+9.45304214E-4*T^2-6.02409443E-7*T^3+1.2858961E-10*T^4}; argunit = K; fununit = J/(kg*K)

Physics
  semi: Semiconductor on domains 1-8
    dependent variable V
    ShapeProperty.Formulation = FEM1Ef
    LatticeProperties.T0 = Tref
    d.d = d0
    ModelProperties.CarrierStatistics = FermiDirac
    ModelProperties.Compute = MajorityPsi
    smm1: SemiconductorMaterialModel (default) | meDG_mat = from_mat; mhDG_mat = from_mat; minput_temperature = Tref
    ins1: Insulation (default) | meOx_mat = from_mat; meOxStar_mat = from_mat
    zc1: ZeroCharge (default)
    ii1: InsulatorInterface (default) | meOx_mat = from_mat; meOxStar_mat = from_mat
    cont1: Continuity "Continuity/Heterojunction 1" (default) | HeteroModelSelection = 2
    init1: init "Initial Values 1" (default) | V = (-4)[V]
    term5: Terminal "Gate -- Electrostatics" on boundaries 17 | TerminalName = 3; TerminalType = Voltage; V0 = Vdc * Vg_on
      hp1: HarmonicPerturbation on all boundaries | V0 = Vac * Vg_on
    term6: Terminal "Source" on boundaries 13 | TerminalName = 1; TerminalType = Voltage; V0 = Vdc * Vs_on
      hp1: HarmonicPerturbation on all boundaries | V0 = Vac * Vs_on
    term7: Terminal "Drain" on boundaries 21 | TerminalName = 2; TerminalType = Voltage; V0 = Vdc * Vd_on
      hp1: HarmonicPerturbation on all boundaries | V0 = Vac * Vd_on
    ccn1: ChargeConservation on domains 6-8 | minput_temperature = Tref
    gdm1: GeometricDopingModel on domains 2
      impurityType = donor
      UserDefinedProfile = 1e17[1/cm^3]*exp(- ( (semi.gdm1.D - 6[nm]) / 0.5[nm] )^2 )
      impurityProfile = user_defined
      jd_gen = 6[nm]
      Nb_gen = 2.5e14[1/cm^3]
      gdmbs1: BoundarySelectionForDopingProfile on boundaries 6

Mesh
  mesh1 "Mesh 1"
    size: MeshSizeDefault | hmax = 2.35E-5; hmin = 1.05E-7; hcurve = 0.3; hgrad = 1.3
    edg1: Edge on boundaries 12, 19
      dis1: Distribution on boundaries 12, 13, 19, 21
        type = predefined
        elemcount = n_edges/2-1
        elemratio = edge_ratio
        growthrate = exponential
        symmetric = on
    edg3: Edge on boundaries 15
      dis1: Distribution on boundaries 12, 13, 15, 19, 21
        type = predefined
        elemcount = n_edges
        elemratio = edge_ratio
        growthrate = exponential
        symmetric = on
    cpe7: CopyEdge | source = boundaries 12; destination = boundaries 13
    cpe9: CopyEdge | source = boundaries 19; destination = boundaries 21
    cpe10: CopyEdge | source = boundaries 15; destination = boundaries 17
    map1: Map "Mapped 1" on domains 6
      dis1: Distribution on boundaries 11, 14 | numelem = nvert_al
    map2: Map "Mapped 2" on domains 8
      dis1: Distribution on boundaries 18, 27 | numelem = nvert_al
    cpe11: CopyEdge | source = boundaries 12, 15, 19; destination = boundaries 2, 4, 6, 8, 10
    map3: Map "Mapped 3" on domains 3-5
      dis1: Distribution on boundaries 5, 7, 9, 24-26 | numelem = nvert_2deg
    map4: Map "Mapped 4" on domains 2
      dis1: Distribution on boundaries 3, 23 | type = predefined; reverse = on; elemcount = nvert_inalas; elemratio = 15
    map5: Map "Mapped 5" on domains 1
      dis1: Distribution on boundaries 1, 22 | type = predefined; elemcount = 50; elemratio = 10; growthrate = exponential
    map6: Map "Mapped 6" (disabled) on no domains
      dis1: Distribution on no boundaries | type = predefined; elemcount = nvert_al2o3
    map7: Map "Mapped 7" (disabled) on no domains
      dis1: Distribution on no boundaries | type = predefined; elemcount = nvert_al2o3
    map8: Map "Mapped 8" on domains 7

Studies
  std3 "Study 0: Gate-less Equilibrium, Run this first"
    semie1: SemiconductorEquilibrium | pname = cp_Na; plistarr = 10^{range(log10(1.0e-4),1/10,log10(1))}
  std7 "Study 1: Equilibrium, Charge concentrations"
    param6: Parametric "Parametric Sweep: Vdc sweep 1"
      sweeptype = filled
      pname = {Vdc, Vg_on}
      plistarr = {0 -range(0.25, 0.25, 5), 1}
      punit = {V, }
    semie: SemiconductorEquilibrium
      disabledphysics = {semi/term5/hp1, semi/term6/hp1, semi/term7/hp1}
      useparam = on
      pname = Tref
      plistarr = 300 200 150 50
      punit = K
  std9 "Study 9: Admittance Matrix -- Harmonic Perturbation"
    param10: Parametric "Parametric Sweep: Vac sweep 1.1.1"
      sweeptype = filled
      pname = Vdc
      plistarr = 0 -range(0.25, 0.25, 5)
      punit = V
    param6: Parametric "Parametric Sweep: C-matrix terminal sweep 1"
      pname = {Vs_on, Vd_on, Vg_on}
      plistarr = {1 0 0, 0 1 0, 0 0 1}
      punit = {, , }
    semie: SemiconductorEquilibrium
    frlin: Frequencylinearized "Frequency Domain Perturbation"
      plist = range(fmin,(fmax - fmin) / Nf,fmax)
      useparam = on

Solver configurations
  sol1179 "Solution 1179" (study std3)
    v1: Variables "Dependent Variables 1"
      comp1_Efn_: Field "Electron solution variable (comp1.Efn_)" | scalemethod = manual; scaleval = 1
      comp1_V: Field "Electric potential (comp1.V)" | scalemethod = manual; scaleval = 1
    s1: Stationary "Stationary Solver 1" | stol = 1.0E-6
      fc1: FullyCoupled | initstep = 0.1; minsteprecovery = 0.001; maxiter = 50
      d1: Direct
  sol1438 "Solution 1438" (study std9)
    v1: Variables "Dependent Variables 1"
      comp1_Efn_: Field "Electron solution variable (comp1.Efn_)" | scalemethod = manual; scaleval = 1
      comp1_V: Field "Electric potential (comp1.V)" | scalemethod = manual; scaleval = 1
    s1: Stationary "Stationary Solver 1" | stol = 1.0E-6
      fc1: FullyCoupled | initstep = 0.1; minsteprecovery = 0.001; maxiter = 50
      d1: Direct
    su1: StoreSolution "Solution Store 2"
    v2: Variables "Dependent Variables 2" | initmethod = sol; notsolmethod = sol
      comp1_Efn_: Field "Electron solution variable (comp1.Efn_)" | scalemethod = manual; scaleval = 1
      comp1_V: Field "Electric potential (comp1.V)" | scalemethod = manual; scaleval = 1
    s2: Stationary "Stationary Solver 2" | nonlin = linper; linpmethod = sol; linpsolnum = all; storelinpoint = on
      p1: Parametric
        sweeptype = filled
        pname = {freq, Tref}
        plistarr = {range(fmin,(fmax - fmin) / Nf,fmax), 300 200 150 50}
        punit = {Hz, K}
        pcontinuationmode = no
      fc1: FullyCoupled
      d1: Direct
  sol1439 "Solution Store 2" (study std9)
  sol1440 "Parametric Solutions 4" (study std9)
  sol1504 "Solution 1504" (study std7)
    v1: Variables "Dependent Variables 1"
      comp1_Efn_: Field "Electron solution variable (comp1.Efn_)" | scalemethod = manual; scaleval = 1
      comp1_V: Field "Electric potential (comp1.V)" | scalemethod = manual; scaleval = 1
    s1: Stationary "Stationary Solver 1" | stol = 1.0E-6
      p1: Parametric | pname = Tref; plistarr = 300 200 150 50; punit = K; porder = constant
      fc1: FullyCoupled | initstep = 0.1; minsteprecovery = 0.001; maxiter = 50
      d1: Direct
  sol1505 "Parametric Solutions 3" (study std7)

Datasets
  dset10: Solution | solution = sol1438
  dset11: Solution | solution = sol1439
  dset12: Solution | solution = sol1440
  dset13: Solution | solution = sol1179
  dset14: Solution | solution = sol1504
  dset15: Solution | solution = sol1505

Evaluation groups
  eg1: EvaluationGroup "Admittance, Harmonic Perturbation" | data = dset12
    gev1: EvalGlobal "Global Evaluation 1"
      expr = {lindev(semi.I0_1) / lindev(semi.V0_1), lindev(semi.I0_1) / lindev(semi.V0_2), lindev(semi.I0_1) / lindev(semi.V0_3), lindev(semi.I0_2) / lindev(semi.V0_1), lindev(semi.I0_2) / lindev(semi.V0_2), lindev(semi.I0_2) / lindev(semi.V0_3), lindev(semi.I0_3) / lindev(semi.V0_1), lindev(semi.I0_3) / lindev(semi.V0_2), lindev(semi.I0_3) / lindev(semi.V0_3)}
      unit = {S, S, S, S, S, S, S, S, S}

Exports
  tbl1: Table "Y Matrix vs frequency, Vg"
    source = evaluationgroup
    filename = /home/nick/tcap/data/ymatrix_50K_freq_vgall_230618.txt
  data1: Data "Charge concentration vs. Vg"
    data = dset15
    expr = semi.log10N
    unit = 1
    descr = Log of electron concentration
    filename = /home/nick/tcap/data/surface_density_50K_vgall_230618.txt
    location = grid
    gridx2 = range(9.9e-6,1.0e-8,1.02e-5)
    gridy2 = range(-8.0e-8,1.0e-9,1.17e-7)
    separator = ,