// COMSOL Multiphysics 6.1.0.357 model "single_top_gate_2deg.mph"
// Outline of the model tree

Parameters
  h_InGaAs_top = 10 [nm]  // Height of the top InGaAs buffer
  h_InAs = 4 [nm]  // Height of the InAs Well
  h_InGaAs_bot = 4 [nm]  // Height of the bottom InGaAs buffer
  h_2deg = h_InGaAs_top + h_InAs + h_InGaAs_bot  // Height of the full 2DEG
  w_air_gap = 5 [nm]  // Width of the air gap
  d0 = 5 [um]  // Out of plane thickness
  w_2deg = 2 * w_gate + L_2DEG  // Width of the 2DEG
  w_gate = 10 [um]  // Width of the gated region
  h_gate = 50 [nm]  // Height of the gate oxide
  Vsd = 10 [mV]  // Source-Drain voltage difference
  Vg = 0 [V]  // Gate voltage
  TerminalName = 1  // Dummy variable for port sweep to generate the Maxwell capacitance matrix
  w_sub_gate = 100[nm]  // Width of the individual gates
  eps_InAs = 15.15
  eps_SiO2 = 3.8
  eps_InGaAs = 14.03
  tand_InAs = 4.8e-5
  tand_InGaAs = 4.8e-5
  tand_SiO2 = 2e-3
  h_InAlAs = 100[nm]  // Height of InAlAs layer
  epsr_InAlAs = 13.13
  tand_InAlAs = 4.8e-5
  t_ox = 3[nm]  // Oxide thickness assumed in participation ratio calculations
  h_InP = 350[um]  // InP substrate height
  nxedges = 5  // Number of horizontal mesh elements in 2DEG
  nyedges = 7  // Number of vertical mesh elements in 2DEG
  s_gate = 100 [nm]  // Spacing between gates (and terminals)
  L_2DEG = 100 [nm]  // Length of 2DEG channel
  h_AlxOy = 50 [nm]  // AlxOy thickness (ALD)
  h_Al = 7 [nm]  // Aluminum pad thickness, epitaxial Al (111)
  epsr_InP = 12.9

Geometry
  geom1 "Geometry 1" (2D, length unit m)
    r2: Rectangle "InGaAs Top" | pos = {0, (h_2deg - h_InGaAs_top)}; size = {w_2deg, h_InGaAs_top}
    r4: Rectangle "InAs" | pos = {0, (h_2deg - h_InGaAs_top - h_InAs)}; size = {w_2deg, h_InAs}
    r5: Rectangle "InGaAs Bottom"
      pos = {0, (h_2deg - h_InGaAs_top - h_InAs - h_InGaAs_bot)}
      size = {w_2deg, h_InGaAs_bot}
    r12: Rectangle "InAlAs Bottom"
      pos = {0, (h_2deg - h_InGaAs_top - h_InAs - h_InGaAs_bot - h_InAlAs)}
      size = {w_2deg, h_InAlAs}
    r17: Rectangle "InP Substrate"
      pos = {0, (h_2deg - h_InGaAs_top - h_InAs - h_InGaAs_bot - h_InAlAs - h_InP)}
      size = {w_2deg, h_InP}
    r18: Rectangle "Left Al Contact" | pos = {0, h_2deg}; size = {w_gate, h_Al}
    r19: Rectangle "Right Al Contact" | pos = {(w_2deg - w_gate), h_2deg}; size = {w_gate, h_Al}
    r20: Rectangle "Center Oxide" | pos = {(w_2deg/2 - L_2DEG/2), h_2deg}; size = {L_2DEG, h_AlxOy}
    r23: Rectangle "Center Oxide 1"
      pos = {(w_2deg/2 - L_2DEG/2), 0}
      size = {L_2DEG, h_InGaAs_bot + h_InAs + h_InGaAs_top}
    r21: Rectangle "Top Left Oxide" | pos = {0, (h_2deg + h_Al)}; size = {w_gate, h_AlxOy}
    r22: Rectangle "Top Right Oxide" | pos = {(w_2deg - w_gate), (h_2deg + h_Al)}; size = {w_gate, h_AlxOy}
    dif1: Difference | input = r2, r4, r5; input2 = r23
    r24: Rectangle "Center Oxide 1.1" | pos = {(w_2deg/2 - L_2DEG/2), 0}; size = {L_2DEG/3, h_InGaAs_bot}
    r27: Rectangle "Center Oxide 1.1.2" | pos = {(w_2deg/2 - L_2DEG/2 + L_2DEG/3), 0}; size = {L_2DEG/3, h_InGaAs_bot}
    r28: Rectangle "Center Oxide 1.1.2.1"
      pos = {(w_2deg/2 - L_2DEG/2 + 2 * L_2DEG/3), 0}
      size = {L_2DEG/3, h_InGaAs_bot}
    r25: Rectangle "Center Oxide 1.1.1" | pos = {(w_2deg/2 - L_2DEG/2), h_InGaAs_bot}; size = {L_2DEG/3, h_InAs}
    r29: Rectangle "Center Oxide 1.1.1.2"
      pos = {(w_2deg/2 - L_2DEG/2 + L_2DEG/3), h_InGaAs_bot}
      size = {L_2DEG/3, h_InAs}
    r30: Rectangle "Center Oxide 1.1.1.2.1"
      pos = {(w_2deg/2 - L_2DEG/2 + 2*L_2DEG/3), h_InGaAs_bot}
      size = {L_2DEG/3, h_InAs}
    r26: Rectangle "Center Oxide 1.1.1.1"
      pos = {(w_2deg/2 - L_2DEG/2), h_InGaAs_bot + h_InAs}
      size = {L_2DEG/3, h_InGaAs_top}
    r31: Rectangle "Center Oxide 1.1.1.1.1"
      pos = {(w_2deg/2 - L_2DEG/2 + L_2DEG/3), h_InGaAs_bot + h_InAs}
      size = {L_2DEG/3, h_InGaAs_top}
    r32: Rectangle "Center Oxide 1.1.1.1.1.1"
      pos = {(w_2deg/2 - L_2DEG/2 + 2 * L_2DEG/3), h_InGaAs_bot + h_InAs}
      size = {L_2DEG/3, h_InGaAs_top}
    uni1: Union | input = r20, r21, r22
    fin: Finalize "Form Union"

Materials
  mat2: Common "InAs Dielectric" on domains 4, 9, 13, 16, 19
    def "Basic"
      relpermittivity = eps_InAs
    LossTangentDF "Loss tangent, dissipation factor"
      tanDelta = tand_InAs
      epsilonPrim = eps_InAs
  mat3: Common "InGa(0.81)As(0.19) Dielectric" on domains 3, 5, 8, 10, 12, 14, 15, 17, 18, 20
    def "Basic"
      relpermittivity = eps_InGaAs
    LossTangentDF "Loss tangent, dissipation factor"
      tanDelta = tand_InGaAs
      epsilonPrim = eps_InGaAs
  mat5: Common "Copper Fully Conducting" (disabled) on domains 3-5, 8-10, 12-20
    def "Basic"
      relpermeability = 1
      electricconductivity = 5.998e7[S/m]
      heatcapacity = 385[J/(kg*K)]
      relpermittivity = 1
      emissivity = 0.5
      density = 8940[kg/m^3]
      thermalconductivity = 400[W/(m*K)]
    Enu "Young's modulus and Poisson's ratio"
      E = 126e9[Pa]
      nu = 0.34
    linzRes "Linearized resistivity"
      rho0 = 1.667e-8[ohm*m]
      alpha = 3.862e-3[1/K]
      Tref = 293.15[K]
  mat6: Common "Copper Fully Depleted" (disabled) on domains 3-5, 18-20
    // same settings as mat5
  mat7: Common "Copper Partially Depleted" (disabled) on domains 3-5, 9, 16, 18-20
    // same settings as mat5
  mat13: Common "Copper Weakly Depleted" (disabled) on domains 3-5, 8-10, 15-20
    // same settings as mat5
  mat14: Common "Copper Incompletely Depleted" on domains 3-5, 9, 13, 16, 18-20
    // same settings as mat5
  mat9: Common "In_0.81 Al_0.19 As" on domains 2
    def "Basic"
      relpermittivity = epsr_InAlAs
    LossTangentDF "Loss tangent, dissipation factor"
      tanDelta = tand_InAlAs
      epsilonPrim = epsr_InAlAs
  mat10: Common "InP - Indium Phosphide" on domains 1
    def "Basic"
      relpermittivity = 12.5
      thermalconductivity = 68[W/(m*K)]
      density = 4810[kg/m^3]
      heatcapacity = 310[J/(kg*K)]
    SemicondMaterial "Semiconductor material"
      Eg0 = 1.344[V]
      chi0 = 4.38[V]
      Nv = (T/1[K])^(3/2)*2.2e15[1/cm^3]
      Nc = (T/1[K])^(3/2)*1.1e14[1/cm^3]
      mun = 5400[cm^2/(V*s)]
      mup = 200[cm^2/(V*s)]
    JainRoulstonModel
      An_jr = 17.2e-9[V]
      Bn_jr = 2.62e-7[V]
      Cn_jr = 98.4e-12[V]
      Ap_jr = 10.3e-9[V]
      Bp_jr = 4.43e-7[V]
      Cp_jr = 3.38e-12[V]
      Nref_jr = 1[1/cm^3]
      alpha_jr = 0.5
  mat11: Common "Al2O3 - Aluminum oxide" on domains 7, 11, 22
    def "Basic"
      electricconductivity = 0[S/m]
      thermalexpansioncoefficient = 6.5e-6[1/K]
      heatcapacity = 730[J/(kg*K)]
      relpermittivity = 5.7
      density = 3965[kg/m^3]
      thermalconductivity = 35[W/(m*K)]
    Enu "Young's modulus and Poisson's ratio"
      E = 400e9[Pa]
      nu = 0.22
  mat12: Common "Aluminum" on domains 6, 21
    def "Basic"
      relpermeability = 1
      heatcapacity = 900[J/(kg*K)]
      thermalconductivity = 238[W/(m*K)]
      electricconductivity = 3.774e7[S/m]
      relpermittivity = 1
      thermalexpansioncoefficient = 23e-6[1/K]
      density = 2700[kg/m^3]
    Enu "Young's modulus and Poisson's ratio"
      E = 70e9[Pa]
      nu = 0.33
    Murnaghan
      l = -2.5e11[Pa]
      m = -3.3e11[Pa]
      n = -3.5e11[Pa]
    Lame "Lamé parameters"
      lambLame = 5.1e10[Pa]
      muLame = 2.6e10[Pa]

Physics
  es: Electrostatics on all domains
    dependent variable V
    ShapeProperty.order_electricpotential = 1
    d.d = d0
    PortSweepSettings.useSweep = 1
    ccn1: ChargeConservation (default)
    zc1: ZeroCharge (default)
    init1: init "Initial Values 1" (default)
    term7: Terminal on boundaries 14 | TerminalType = Voltage; V0 = Vg
    term8: Terminal on boundaries 50 | TerminalType = Voltage; V0 = Vg
    term4: Terminal on boundaries 15, 25, 26, 51, 52 | TerminalType = Voltage; V0 = Vg
    fp5: FloatingPotential "Floating Potential Fully Depleted" (disabled) on boundaries 16-18, 20, 23, 28, 33, 35, 40, 41, 43, 45
      Tag = fp1
    fp6: FloatingPotential "Floating Potential Partially Depleted" (disabled) on boundaries 16, 17, 19-21, 23, 28, 29, 33, 35-37, 39-41, 45
      Tag = fp1
    fp7: FloatingPotential "Floating Potential Incompletely Depleted" (disabled) on boundaries 16, 17, 19-21, 23, 28, 30, 32, 33, 35, 37, 39-41, 45
      Tag = fp1
    fp8: FloatingPotential "Floating Potential Weakly Depleted" (disabled) on boundaries 27-29, 31, 33, 34, 36, 38
      Tag = fp1
    fp3: FloatingPotential "Floating Potential Fully Conducting" (disabled) on boundaries 5-7, 9, 12, 23, 28, 33, 40, 42, 48, 55-57
      Tag = fp1

Mesh
  mesh1 "Mesh 1"
    size: MeshSizeDefault | hmax = 2.35E-5; hmin = 1.05E-7; hcurve = 0.3; hgrad = 1.3
    edg1: Edge on boundaries 12, 48
      dis1: Distribution on boundaries 12, 23, 33, 40, 48
        type = predefined
        elemcount = nxedges
        elemratio = 5
        growthrate = exponential
        symmetric = on
    edg2: Edge on boundaries 23, 33, 40
      dis1: Distribution on boundaries 23, 33, 40
        type = predefined
        elemcount = 2*nxedges
        elemratio = 5
        growthrate = exponential
        symmetric = on
    cpe1: CopyEdge | source = boundaries 12, 23, 33, 40, 48; destination = boundaries 10, 21, 32, 39, 46
    cpe7: CopyEdge | source = boundaries 10, 21, 32, 39, 46; destination = boundaries 8, 19, 30, 37, 44
    cpe8: CopyEdge | source = boundaries 8, 19, 30, 37, 44; destination = boundaries 6, 17, 28, 35, 42
    cpe9: CopyEdge | source = boundaries 6, 17, 28, 35, 42; destination = boundaries 2, 4
    cpe10: CopyEdge | source = boundaries 12; destination = boundaries 14, 15
    cpe11: CopyEdge | source = boundaries 23, 33, 40; destination = boundaries 26
    cpe12: CopyEdge | source = boundaries 48; destination = boundaries 50, 52
    map2: Map "Mapped 2" on domains 3-5, 8-10, 12-20
      dis1: Distribution on boundaries 5, 7, 9, 55-57
        type = predefined
        elemcount = nyedges
        elemratio = 5
        growthrate = exponential
        symmetric = on
    map1: Map "Mapped 1" on domains 2
      dis1: Distribution on boundaries 3, 54
        type = predefined
        elemcount = nyedges
        elemratio = 5
        growthrate = exponential
        symmetric = on
    map3: Map "Mapped 3" on domains 21
      dis1: Distribution on boundaries 58
        type = predefined
        elemcount = nyedges
        elemratio = 5
        growthrate = exponential
        symmetric = on
    map6: Map "Mapped 6" on domains 6
      dis1: Distribution on boundaries 11
        type = predefined
        elemcount = nyedges
        elemratio = 5
        growthrate = exponential
        symmetric = on
    map4: Map "Mapped 4" on domains 22
      dis1: Distribution on boundaries 59 | numelem = 2*nyedges
    map5: Map "Mapped 5" on domains 7
      dis1: Distribution on boundaries 13 | numelem = 2*nyedges
    map7: Map "Mapped 7" on domains 11
    map8: Map "Mapped 8" on domains 1
      dis1: Distribution on boundaries 1, 53
        type = predefined
        elemcount = 50
        elemratio = 5
        growthrate = exponential
        symmetric = on

Studies
  std1 "Study 1"
    param: Parametric "Parametric Sweep" | pname = TerminalName; plistarr = 1 2 3
    stat: Stationary

Solver configurations
  sol1 "Solution 1" (study std1)
    v1: Variables "Dependent Variables 1"
    s1: Stationary "Stationary Solver 1"
      fc1: FullyCoupled | linsolver = d1
      d1: Direct
  sol2 "Parametric Solutions 1" (study std1)

Datasets
  dset1: Solution | solution = none
  dset2: Solution | solution = none
  dset3: Solution | solution = none
  dset4: Solution | solution = none
  dset5: Solution | solution = none
  dset6: Solution | solution = sol1
  dset7: Solution | solution = sol2

Evaluation groups
  eg1: EvaluationGroup "Capacitance Matrix" | data = dset7
    gmev1: EvalGlobalMatrix "Global Matrix Evaluation 1" | expr = es.C; unit = fF; descr = Maxwell capacitance
  eg2: EvaluationGroup "Participation Ratios" | data = dset7
    int2: IntSurface "InGaAs Top Participation Ratios" on domains 5, 10, 14, 17, 20
      expr = 0.5 * t_ox * eps_InGaAs * epsilon0_const * es.normE^2 / es.intWe
      unit = 1
      descr = p_InGaAs_10nm
    int1: IntSurface "InAs Participation Ratios" on domains 4, 9, 13, 16, 19
      expr = 0.5* t_ox * eps_InAs * epsilon0_const * es.normE^2 / es.intWe
      unit = 1
      descr = p_InAs_4nm
    int3: IntSurface "InGaAs Bottom Participation Ratios" on domains 3, 8, 12, 15, 18
      expr = 0.5* t_ox * eps_InGaAs * epsilon0_const * es.normE^2 / es.intWe
      unit = 1
      descr = p_InGaAs_4nm
    int5: IntSurface "InAlAs Bottom Participation Ratios" on domains 1
      expr = 0.5 * t_ox * epsr_InAlAs * epsilon0_const * es.normE^2 / es.intWe
      unit = 1
      descr = p_InAlAs_20nm
    int6: IntSurface "InP Participation Ratios" on domains 1
      expr = 0.5 * t_ox * epsr_InP * epsilon0_const * es.normE^2 / es.intWe
      unit = 1
      descr = p_InP_350um
    int4: IntSurface "SiO2 Participation Ratios" on domains 7, 11, 22
      expr = 0.5 * t_ox * eps_SiO2 * epsilon0_const * es.normE^2 / es.intWe
      unit = 1
      descr = p_SiO2_50nm

Plots
  pg2: PlotGroup2D "Electric Potential (es) 1" | data = dset7
    surf1: Surface | expr = V
  pg3: PlotGroup2D "Electric Field" | data = dset7
    surf1: Surface | expr = es.Dx